# Исходные данные
# матрица средних количеств вычислительных операций, выполняемых при обслуживании процесса [Мфлоп]
Θ := [700; 400; 1000; 900; 100]
λ := [0.2; 0.4; 0.05; 0.05; 0.20]
# интенсивности потоков [1/с]
# Среднее число операций обращения к файлам данных при обслуживании процесса (Nij)
N := [
    20, 0, 0, 10, 0, 0, 2, 0, 4, 0;
    10, 0, 30, 14, 0, 0, 4, 0, 6, 0;
    0, 30, 0, 0, 0, 20, 6, 0, 8, 0;
    0, 80, 0, 30, 0, 0, 8, 0, 0, 4;
    20, 10, 0, 0, 0, 0, 4, 2, 0, 0
]
# Среднее время выполнения одной операции ввода/вывода данных [мкс/оп]
Tob := [1, 0; 0, 0.1; 2, 0; 0, 0.05; 3, 0; 0, 0.06; 2.5, 0; 0, 0.13; 2.5, 0; 0, 0.12]
Vf := [0.5; 1; 1; 1.5; 1.5; 2.0; 2.5; 3.0; 4.0; 0.5]  # Объем данных, передаваемых при выполнении одной операции обращения к файлу данных [Мбайт]
# Средний объем данных,
# передаваемых при выполнении одной операции ввода/вывода [Кбайт]
Gf := [5; 8; 15; 6; 14; 18; 10; 15; 20; 5]
i := 0 .. 9
j := 0 .. 4
# количество файлов | количество процессов
# Вычисления
υpr(Vp) := sum(Θ[i], i = 0 .. 4)/Vp
R(Vp, c) := sum(λ[i], i = 0 .. c - 1)*υpr(Vp)
υVZU(number) := sum(Tob[j, number - 1]*sum(N[i, j], i = 0 .. 4), j = 0 .. 9)
w(Vp, c, ν) := sum(λ[i]*υpr(Vp)^2*(1 + ν^2)/(2*(1 - R(Vp, c))*(1 - R(Vp, c - 1)))*10^6, i = 0 .. 4)
w1(Vp, c, ν) := sum(λ[i]*υpr(Vp)^2*(1 + ν^2)/(2*(1 - R(Vp, c))*(1 - 0))*10^6, i = 0 .. 4)
Vp := 1*10^5, 1.2*10^5 .. 5*10^5
U(Vp, c, ν) := sum(w(Vp, i, ν), i = 2 .. c) + w1(Vp, 1, ν) + sum(υpr(Vp), i = 1 .. c)
U1(Vp, c, ν) := w1(Vp, 1, ν) + sum(υpr(Vp), i = 1 .. c)
# [plot: w1(Vp, 1, 0), w(Vp, 2, 0), w(Vp, 3, 0), w(Vp, 4, 0), w(Vp, 5, 0) vs Vp]
# W(Омега) v = 0
w(Vp, 2, 0) = [443.395; 306.625; 224.603; 171.578; 135.332; 109.467; 90.3657; 75.8605; 64.5869; 55.6515; 48.4499; 42.5608; 37.6837; 33.5992; 30.1446; 27.1965; 24.6608; 22.4638; 20.5478; 18.8669; 17.3841]
w(Vp, 3, 0) = [449.708; 310.25; 226.874; 173.093; 136.393; 110.238; 90.944; 76.3052; 64.9361; 55.9308; 48.6767; 42.7475; 37.8392; 33.7301; 30.2558; 27.2919; 24.7431; 22.5353; 20.6104; 18.922; 17.4328]
w(Vp, 4, 0) = [451.133; 311.066; 227.384; 173.433; 136.63; 110.411; 91.0734; 76.4046; 65.0142; 55.9932; 48.7274; 42.7892; 37.8739; 33.7594; 30.2806; 27.3131; 24.7614; 22.5513; 20.6244; 18.9343; 17.4437]
w(Vp, 5, 0) = [454.729; 313.123; 228.669; 174.287; 137.228; 110.845; 91.3984; 76.6543; 65.2101; 56.1498; 48.8544; 42.8938; 37.961; 33.8326; 30.3428; 27.3664; 24.8074; 22.5913; 20.6593; 18.965; 17.4709]
w1(Vp, 1, 0) = [435.148; 301.872; 221.619; 169.583; 133.934; 108.449; 89.6017; 75.2726; 64.1248; 55.2818; 48.1495; 42.3134; 37.4775; 33.4256; 29.997; 27.0701; 24.5515; 22.3688; 20.4647; 18.7938; 17.3195]
# [plot: w1(Vp, 1, 1), w(Vp, 2, 1), w(Vp, 3, 1), w(Vp, 4, 1), w(Vp, 5, 1) vs Vp]
w1(Vp, 1, 1) = [870.296; 603.744; 443.238; 339.166; 267.867; 216.897; 179.203; 150.545; 128.25; 110.564; 96.299; 84.6269; 74.955; 66.8512; 59.994; 54.1402; 49.1031; 44.7376; 40.9295; 37.5876; 34.639]
w(Vp, 2, 1) = [886.79; 613.25; 449.206; 343.155; 270.664; 218.933; 180.731; 151.721; 129.174; 111.303; 96.8998; 85.1216; 75.3673; 67.1984; 60.2891; 54.3931; 49.3215; 44.9275; 41.0956; 37.7338; 34.7683]
w(Vp, 3, 1) = [899.415; 620.5; 453.748; 346.185; 272.785; 220.476; 181.888; 152.61; 129.872; 111.862; 97.3534; 85.4951; 75.6784; 67.4603; 60.5116; 54.5838; 49.4861; 45.0706; 41.2208; 37.844; 34.8657]
w(Vp, 4, 1) = [902.265; 622.133; 454.768; 346.865; 273.261; 220.822; 182.147; 152.809; 130.028; 111.986; 97.4548; 85.5784; 75.7478; 67.5187; 60.5613; 54.6263; 49.5228; 45.1026; 41.2487; 37.8685; 34.8874]
w(Vp, 5, 1) = [909.459; 626.247; 457.337; 348.575; 274.456; 221.689; 182.797; 153.309; 130.42; 112.3; 97.7089; 85.7875; 75.9219; 67.6652; 60.6857; 54.7329; 49.6148; 45.1825; 41.3186; 37.93; 34.9418]
# [plot: U1(Vp, 1, 0), U(Vp, 2, 0), U(Vp, 3, 0), U(Vp, 4, 0), U(Vp, 5, 0) vs Vp]
U1(Vp, 1, 0) = [435.179; 301.898; 221.641; 169.602; 133.951; 108.464; 89.6158; 75.2855; 64.1367; 55.2929; 48.1598; 42.3231; 37.4866; 33.4342; 30.0052; 27.0778; 24.5589; 22.3759; 20.4715; 18.8003; 17.3257]
U(Vp, 2, 0) = [878.605; 608.549; 446.267; 341.199; 269.3; 217.946; 179.996; 151.159; 128.736; 110.956; 96.6201; 84.8936; 75.1794; 67.0421; 60.1579; 54.2821; 49.2271; 44.8467; 41.026; 37.6736; 34.716]
U(Vp, 3, 0) = [1328.34; 918.825; 673.163; 514.311; 405.71; 328.2; 270.954; 227.477; 193.684; 166.897; 145.307; 127.651; 113.028; 100.781; 90.4218; 81.5818; 73.9775; 67.389; 61.6432; 56.6021; 52.1551]
U(Vp, 4, 0) = [1779.51; 1229.92; 900.569; 687.763; 542.358; 438.626; 362.041; 303.895; 258.71; 222.902; 194.045; 170.45; 150.911; 134.549; 120.711; 108.903; 98.7463; 89.9474; 82.2743; 75.5428; 69.605]
U(Vp, 5, 0) = [2234.27; 1543.07; 1129.26; 862.07; 679.603; 549.486; 453.454; 380.562; 323.932; 279.063; 242.91; 213.353; 188.881; 168.39; 151.062; 136.277; 123.561; 112.546; 102.94; 94.5143; 87.0821]
# [plot: U1(Vp, 1, 1), U(Vp, 2, 1), U(Vp, 3, 1), U(Vp, 4, 1), U(Vp, 5, 1) vs Vp]
U1(Vp, 1, 1) = [870.327; 603.77; 443.261; 339.185; 267.884; 216.913; 179.217; 150.558; 128.262; 110.575; 96.3094; 84.6365; 74.9641; 66.8599; 60.0022; 54.1479; 49.1105; 44.7447; 40.9362; 37.5941; 34.6452]
U(Vp, 2, 1) = [1757.15; 1217.05; 892.489; 682.36; 538.566; 435.862; 359.963; 302.292; 257.447; 221.889; 193.219; 169.768; 150.341; 134.067; 120.299; 108.549; 98.4394; 89.6793; 82.0386; 75.3344; 69.4196]
U(Vp, 3, 1) = [2656.59; 1837.57; 1346.26; 1028.56; 811.368; 656.353; 541.865; 454.915; 387.331; 333.762; 290.583; 255.273; 226.028; 201.536; 180.819; 163.14; 147.933; 134.757; 123.266; 113.185; 104.292]
U(Vp, 4, 1) = [3558.89; 2459.73; 1801.05; 1375.45; 1084.65; 877.19; 724.026; 607.737; 517.372; 445.759; 388.048; 340.861; 301.785; 269.063; 241.389; 217.774; 197.463; 179.867; 164.522; 151.06; 139.185]
U(Vp, 5, 1) = [4468.38; 3086; 2258.41; 1724.04; 1359.12; 1098.9; 906.837; 761.059; 647.804; 558.07; 485.768; 426.658; 377.716; 336.737; 302.082; 272.515; 247.085; 225.056; 205.847; 188.996; 174.133]
w(Vp, c, ν) := (sum(λ[i]*υpr(Vp)^2*(1 + ν^2)/(2*(1 - R(Vp, c))*(1 - R(Vp, c - 1))), i = 0 .. 4) + υpr(Vp)*R(Vp, c - 1)/(1 - R(Vp, c)))*10^6
w1(Vp, c, ν) := (sum(λ[i]*υpr(Vp)^2*(1 + ν^2)/(2*(1 - R(Vp, c))*(1 - 0)), i = 0 .. 4) + υpr(Vp)*0/(1 - R(Vp, c)))*10^6
# [plot: w1(Vp, 1, 0), w(Vp, 2, 0), w(Vp, 3, 0), w(Vp, 4, 0), w(Vp, 5, 0) vs Vp]
U(Vp, c, ν) := sum(w(Vp, i, ν), i = 2 .. c) + w1(Vp, 1, ν) + sum(υpr(Vp), i = 1 .. c)
U1(Vp, c, ν) := w1(Vp, 1, ν) + sum(υpr(Vp), i = 1 .. c)
w1(Vp, 1, 0) = [435.148; 301.872; 221.619; 169.583; 133.934; 108.449; 89.6017; 75.2726; 64.1248; 55.2818; 48.1495; 42.3134; 37.4775; 33.4256; 29.997; 27.0701; 24.5515; 22.3688; 20.4647; 18.7938; 17.3195]
w(Vp, 2, 0) = [639.238; 442.198; 323.985; 247.539; 195.272; 157.968; 130.415; 109.489; 93.2237; 80.3308; 69.9387; 61.4401; 54.4014; 48.5065; 43.5203; 39.2652; 35.6049; 32.4336; 29.6679; 27.2414; 25.1009]
w(Vp, 3, 0) = [1038.17; 717.505; 525.354; 401.2; 316.37; 255.855; 211.177; 177.257; 150.898; 130.01; 113.177; 99.4129; 88.0155; 78.4713; 70.3994; 63.5118; 57.5877; 52.4554; 47.9798; 44.0535; 40.5902]
w(Vp, 4, 0) = [1089.64; 752.84; 551.101; 420.791; 331.776; 268.286; 221.419; 185.84; 158.196; 136.29; 118.639; 104.207; 92.2565; 82.25; 73.7874; 66.5667; 60.3563; 54.9762; 50.2846; 46.1689; 42.5386]
w(Vp, 5, 0) = [1146.74; 791.396; 578.862; 441.724; 348.12; 281.399; 232.171; 194.816; 165.801; 142.817; 124.301; 109.165; 96.6345; 86.1439; 77.2733; 69.7055; 63.1974; 57.5599; 52.6444; 48.3328; 44.5299]
# [plot: w1(Vp, 1, 1), w(Vp, 2, 1), w(Vp, 3, 1), w(Vp, 4, 1), w(Vp, 5, 1) vs Vp]
w1(Vp, 1, 1) = [870.296; 603.744; 443.238; 339.166; 267.867; 216.897; 179.203; 150.545; 128.25; 110.564; 96.299; 84.6269; 74.955; 66.8512; 59.994; 54.1402; 49.1031; 44.7376; 40.9295; 37.5876; 34.639]
w(Vp, 2, 1) = [1082.63; 748.823; 548.588; 419.116; 330.604; 267.435; 220.781; 185.35; 157.811; 135.982; 118.389; 104.001; 92.0851; 82.1057; 73.6648; 66.4617; 60.2657; 54.8974; 50.2157; 46.1083; 42.485]
w(Vp, 3, 1) = [1487.87; 1027.76; 752.227; 574.292; 452.763; 366.093; 302.121; 253.562; 215.834; 185.941; 161.853; 142.16; 125.855; 112.201; 100.655; 90.8037; 82.3308; 74.9907; 68.5902; 62.9755; 58.023]
w(Vp, 4, 1) = [1540.77; 1063.91; 778.485; 594.224; 468.407; 378.697; 312.492; 262.245; 223.21; 192.283; 167.366; 146.996; 130.13; 116.009; 104.068; 93.8799; 85.1177; 77.5274; 70.909; 65.1032; 59.9823]
w(Vp, 5, 1) = [1601.47; 1104.52; 807.53; 616.012; 485.348; 392.244; 323.57; 271.47; 231.011; 198.967; 173.155; 152.059; 134.595; 119.977; 107.616; 97.0719; 88.0048; 80.1511; 73.3037; 67.2978; 62.0008]
# [plot: U1(Vp, 1, 0), U(Vp, 2, 0), U(Vp, 3, 0), U(Vp, 4, 0), U(Vp, 5, 0) vs Vp]
U1(Vp, 1, 0) = [435.179; 301.898; 221.641; 169.602; 133.951; 108.464; 89.6158; 75.2855; 64.1367; 55.2929; 48.1598; 42.3231; 37.4866; 33.4342; 30.0052; 27.0778; 24.5589; 22.3759; 20.4715; 18.8003; 17.3257]
U(Vp, 2, 0) = [1074.45; 744.122; 545.648; 417.16; 329.24; 266.447; 220.045; 184.788; 157.372; 135.635; 118.109; 103.773; 91.8972; 81.9493; 73.5336; 66.3508; 60.1712; 54.8165; 50.1461; 46.0481; 42.4327]
U(Vp, 3, 0) = [2112.64; 1461.65; 1071.02; 818.379; 645.628; 522.318; 431.236; 362.057; 308.282; 265.656; 231.296; 203.196; 179.922; 160.429; 143.941; 129.87; 117.766; 107.279; 98.1326; 90.1081; 83.0291]
U(Vp, 4, 0) = [3202.31; 2214.52; 1622.15; 1239.19; 977.421; 790.62; 652.67; 547.911; 466.49; 401.957; 349.945; 307.412; 272.187; 242.688; 217.737; 196.445; 178.13; 162.262; 148.424; 136.283; 125.574]
U(Vp, 5, 0) = [4349.08; 3005.94; 2201.03; 1680.93; 1325.56; 1072.03; 884.855; 742.74; 632.303; 544.785; 474.256; 416.586; 368.831; 328.84; 295.018; 266.158; 241.335; 219.829; 201.075; 184.623; 170.11]
# [plot: U1(Vp, 1, 1), U(Vp, 2, 1), U(Vp, 3, 1), U(Vp, 4, 1), U(Vp, 5, 1) vs Vp]
U1(Vp, 1, 1) = [870.327; 603.77; 443.261; 339.185; 267.884; 216.913; 179.217; 150.558; 128.262; 110.575; 96.3094; 84.6365; 74.9641; 66.8599; 60.0022; 54.1479; 49.1105; 44.7447; 40.9362; 37.5941; 34.6452]
U(Vp, 2, 1) = [1952.99; 1352.62; 991.871; 758.321; 598.506; 484.363; 400.012; 335.921; 286.084; 246.568; 214.708; 188.647; 167.058; 148.974; 133.675; 120.617; 109.384; 99.6491; 91.1586; 83.7088; 77.1363]
U(Vp, 3, 1) = [3440.89; 2380.4; 1744.12; 1332.63; 1051.29; 850.472; 702.148; 589.496; 501.93; 432.52; 376.572; 330.817; 292.922; 261.184; 234.339; 211.429; 191.722; 174.647; 159.756; 146.691; 135.166]
U(Vp, 4, 1) = [4981.7; 3444.33; 2522.63; 1926.88; 1519.71; 1229.18; 1014.65; 851.754; 725.152; 624.814; 543.948; 477.823; 423.062; 377.202; 338.415; 305.316; 276.847; 252.181; 230.671; 211.8; 195.154]
U(Vp, 5, 1) = [6583.19; 4548.88; 3330.18; 2542.91; 2005.08; 1621.44; 1338.24; 1123.24; 956.175; 823.792; 717.114; 629.891; 557.666; 497.187; 446.039; 402.396; 364.859; 332.34; 303.982; 279.105; 257.161]
